Xa := -2
Xc := 0
Xe := 2
Xg := 2
Ya := -4
Yc := 4
Ye := -4
Yg := 0
Xd := 3
Xf := -2
Xb := -3
Yd := 0
Yf := 0
Yb := 0
# координаты левого верхнего угла | координаты правого нижнего угла | -(-оконная)
Ylw := 200
Xlw := 100
Yhw := 500
Xhw := 400
Zy := [Ya, Yb, Yc, Yd, Ye, Yf, Yg]
Zx := [Xa, Xb, Xc, Xd, Xe, Xf, Xg]
# левый верхний в мир. | правый нижний в мир. | -(-мир)
Xh := max(Zx) = 3
Xl := min(Zx) = -3
Yl := min(Zy) = -4
Yh := max(Zy) = 4
# Ширина обсласти отображения в оконных | Ширина области отображения в мировых
qXw := Xhw - Xlw = 300
qX := Xh - Xl = 6
# Высота области отображения в оконных | Высота области отображения в мировых
qYw := Yhw - Ylw = 300
qY := Yh - Yl = 8
Kx := qXw/qX = 50
Ky := qYw/qY = 37.5
# Матрица пересчетов из МСК в ОСК
Tsw := [Kx, 0, Xlw - Kx*Xl; 0, -Ky, Yhw + Ky*Yl; 0, 0, 1]
# Вычмсляем координаты в ОСК
[Xaw; Yaw; q] := Tsw*[Xa; Ya; 1]
[Xbw; Ybw; q] := Tsw*[Xb; Yb; 1]
[Xcw; Ycw; q] := Tsw*[Xc; Yc; 1]
[Xdw; Ydw; q] := Tsw*[Xd; Yd; 1]
[Xew; Yew; q] := Tsw*[Xe; Ye; 1]
[Xfw; Yfw; q] := Tsw*[Xf; Yf; 1]
[Xgw; Ygw; q] := Tsw*[Xg; Yg; 1]
[Xaw; Yaw; q] = [150; 500; 1]
[Xbw; Ybw; q] = [100; 350; 1]
[Xcw; Ycw; q] = [250; 200; 1]
[Xdw; Ydw; q] = [400; 350; 1]
[Xew; Yew; q] = [350; 500; 1]
[Xfw; Yfw; q] = [150; 350; 1]
[Xgw; Ygw; q] = [350; 350; 1]
Yw := transpose([Ybw, Ycw, Ydw, Ybw, Yfw, Yaw, Yew, Ygw, Ydw])
Xw := transpose([Xbw, Xcw, Xdw, Xbw, Xfw, Xaw, Xew, Xgw, Xdw])
Y := transpose([Yb, Yc, Yd, Yb, Yf, Ya, Ye, Yg, Yd])
X := transpose([Xb, Xc, Xd, Xb, Xf, Xa, Xe, Xg, Xd])
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